M := transpose([
    10.6, 10.9, 15.2, 17.3, 18.2, 16.1, 13.2, 17.1, 22.9, 21.4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])
n := 50
x := sort(M) = [
    10.3; 10.6; 10.6; 10.7; 10.8; 10.9; 10.9; 11; 11.1; 11.4
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]
min(x) = 10.3
max(x) = 23.4
R := max(x) - min(x) = 13.1
